// COMSOL Multiphysics 6.2.0.339 model "swarming_2D_GitHub.mph"
// Outline of the model tree

Parameters
  phi0 = 0.5  // equilibirium conc of cells
  beta = 1e-10  // 2a^2/h*^2
  Q0 = 0.0003  // ratio of water uptake to g0*hmax
  rin = 500
  W = 0.05
  R = 5000
  h0 = 4
  k = 0.01
  sm = 0.5
  D = 0.01
  kc = 10^-5  // growth rate
  ks = 10^-6  // production rate
  ha = 1  // Precursor film thickness
  hu = 2  // minimum biomass for growth
  hs = 20
  p20 = hs*phi0

Variables
  var2 "Variables 2"
    phi = p2/(p2+p3)
    phia = p3/(p2+p3)
    h = p2+p3
    fmod = (1-2/p2)*(1-exp((0.5-p2)/0.5))
    gmod = (1 + tanh(1000*(sm -p5)))/2
    fmod1 = (1+tanh(1000*(p2-2)))/2

Geometry
  geom1 "Geometry 1" (2D, length unit m)
    c1: Circle | r = R
    c2: Circle | r = rin
    fin: Finalize "Form Union"

Physics
  c: CoefficientFormPDE on all domains
    dependent variable u = {p1, p2, p3, P4, p5}
    cfeq1: CoefficientFormPDE (default)
      c = 
        {0, 0, 0, 0}
        {(p2/p3)*(1/3)*h^3 + beta*p2, 0, 0, (p2/p3)*(1/3)*h^3 + beta*p2}
        {(h^3 )/3, 0, 0, (h^3 )/3}
        {0, 0, 0, 0}
        {p5*(h/p3)*(h^2)/2 + p5*beta*(p2/h), 0, 0, p5*(h/p3)*(h^2)/2 + p5*beta*(p2/h)}
        {-1, 0, 0, -1}
        {0, 0, 0, 0}
        {0, 0, 0, 0}
        {0, 0, 0, 0}
        {0, 0, 0, 0}
        {-1, 0, 0, -1}
        {0, 0, 0, 0}
        {0, 0, 0, 0}
        {0, 0, 0, 0}
        {0, 0, 0, 0}
        {0, 0, 0, 0}
        {W*(p2/p3)*(h^3)/3 + W*beta*p2, 0, 0, W*(p2/p3)*(h^3)/3 + W*beta*p2}
        {W*(h^3)/3, 0, 0, W*(h^3)/3}
        {0, 0, 0, 0}
        {p5*W*(h/p3)*(h^2)/2 + p5*W*beta*(p2/h), 0, 0, p5*W*(h/p3)*(h^2)/2 + p5*W*beta*(p2/h)}
        {0, 0, 0, 0}
        {(p2/p3)*(h^2)/2, 0, 0, (p2/p3)*(h^2)/2}
        {(h^2)/2, 0, 0, (h^2)/2}
        {0, 0, 0, 0}
        {p5*(h/p3)*(h) + D, 0, 0, p5*(h/p3)*(h) + D}
      a = {1, 0, 0, 0, 0, 0, 0, 0, 0, 0, 0, 0, 0, 0, 0, 0, 0, 0, 1, 0, 0, 0, 0, 0, 0}
      f = {0, kc*p2*(1-p2/p20)*fmod, Q0*(phi-phi0)/(1-phi0), 1/h^3 - 1/h^6, ks*p2*(sm -p5)*gmod*fmod1}
      da = {0, 0, 0, 0, 0, 0, 1, 0, 0, 0, 0, 0, 1, 0, 0, 0, 0, 0, 0, 0, 0, 0, 0, 0, 1}
    zflx1: ZeroFluxBoundary "Zero Flux 1" (default)
    init1: init "Initial Values 1" (default) | p1 = 0; p2 = h0; p3 = h0; p5 = sm
    init2: init "Initial Values 2" on domains 1 | p2 = ha*phi0; p3 = ha*phi0; p5 = sm*0.05

Mesh
  mesh1 "Mesh 1"
    size: MeshSizeDefault | hauto = 1
    ftri1: FreeTri "Free Triangular 1" on remaining entities

Studies
  std1 "Study 1"
    time: Transient "Time Dependent" | tlist = range(0,1e5,10e6)

Solver configurations
  sol1 "Solution 1" (study std1)
    v1: Variables "Dependent Variables 1"
    t1: Time "Time-Dependent Solver 1" | tlist = range(0,1e5,10e6)
      dDef: Direct
      fc1: FullyCoupled | linsolver = dDef; dtech = auto

Datasets
  dset1: Solution | solution = sol1

Plots
  pg1: PlotGroup2D "h" | data = dset1
    surf1: Surface "h" | data = dset1; expr = h
      hght1: Height "Height Expression 1" (disabled) | expr = p1
  pg2: PlotGroup2D "p5" | data = dset1
    surf1: Surface | expr = p5
      hght1: Height "Height Expression 1" (disabled) | expr = p1
  pg5: PlotGroup2D "p2" | data = dset1
    surf1: Surface | expr = p2
      hght1: Height "Height Expression 1" | expr = p1
  pg6: PlotGroup2D "p3" | data = dset1
    surf1: Surface | data = dset1; expr = p3
      hght1: Height "Height Expression 1" | expr = p1

Exports
  img2: Image
    size = manualweb
    unit = px
    width = 640
    height = 480
    bmpfilename = D:\OneDrive - smail.iitm.ac.in\Manuscript\Bacterial swarming\swarming_code\Swarming_code_comsol\fmod new manuscript\images\swarming_2D_fmod3_2.bmp
    jpegfilename = C:\Users\Uttam Upadhyay\Downloads\Untitled3.jpg